// SBML level 3 version 1

function max(x, y)
  piecewise(x, x > y, y);
end
max is "minimum of arguments";

function min(x, y)
  piecewise(x, x < y, y);
end
min is "maximum of arguments";

model liver_glucose_7(ext, cyto, Aglc_ext, Alac_ext)
  // Koenig Human Glucose Metabolism
  // Description
  // This is a metabolism model of Human glucose metabolism in SBML format.
  // This model is based on the model described in the article:
  // Quantifying the contribution of the liver to glucose homeostasis: a detailed kinetic model of human hepatic glucose metabolism.
  // König M., Bulik S., Holzhütter HG.
  // PLoS Comput Biol. 2012;8(6)
  // The content of this model has been carefully created in a manual research effort.
  // This file has been created by Matthias Koenig.
  // Terms of use
  // Copyright © 2019 Matthias Koenig.
  // Redistribution and use of any part of this model, with or without modification, are permitted provided that the following conditions are met:
  // Redistributions of this SBML file must retain the above copyright notice, this list of conditions and the following disclaimer.
  // Redistributions in a different form must reproduce the above copyright notice, this list of conditions and the following disclaimer in the documentation and/or other materials provided with the distribution.
  // This model is distributed in the hope that it will be useful, but WITHOUT ANY WARRANTY; without even the implied warranty of MERCHANTABILITY or FITNESS FOR A PARTICULAR PURPOSE.
  // model units - substance: mmole, time: min, volume: litre, area: m2, length: m, extent: mmole

  // Compartments:
  compartment ext = 1 litre; ext is "blood";
  compartment cyto; cyto has litre; cyto is "cytosol";
  compartment mito; mito has litre; mito is "mitochondrion";
  compartment pm = 1 m2; pm is "plasma membrane";  // 2-D
  compartment mm = 1 m2; mm is "mitochondrial membrane";  // 2-D

  // Species:
  substanceOnly species $Aatp in cyto = 2.8*cyto; Aatp is "ATP";
  substanceOnly species $Aadp in cyto = 0.8*cyto; Aadp is "ADP";
  substanceOnly species $Aamp in cyto = 0.16*cyto; Aamp is "AMP";
  substanceOnly species Autp in cyto = 0.27*cyto; Autp is "UTP";
  substanceOnly species Audp in cyto = 0.09*cyto; Audp is "UDP";
  substanceOnly species Agtp in cyto = 0.29*cyto; Agtp is "GTP";
  substanceOnly species Agdp in cyto = 0.1*cyto; Agdp is "GDP";
  substanceOnly species $Anad in cyto = 1.22*cyto; Anad is "NAD+";
  substanceOnly species $Anadh in cyto = 0.00056*cyto; Anadh is "NADH";
  substanceOnly species $Aphos in cyto = 5*cyto; Aphos is "phosphate";
  substanceOnly species App in cyto = 0.008*cyto; App is "pyrophosphate";
  substanceOnly species $Aco2 in cyto = 5*cyto; Aco2 is "CO2";
  substanceOnly species $Ah2o in cyto = 0; Ah2o is "H2O";
  substanceOnly species $Ah in cyto = 0; Ah is "H+";
  substanceOnly species Aglc1p in cyto = 0.012*cyto; Aglc1p is "glucose-1 phosphate";
  substanceOnly species Audpglc in cyto = 0.38*cyto; Audpglc is "UDP-glucose";
  substanceOnly species Aglyglc in cyto = 250*cyto; Aglyglc is "glycogen";
  substanceOnly species Aglc in cyto = 5*cyto; Aglc is "glucose";
  substanceOnly species Aglc6p in cyto = 0.12*cyto; Aglc6p is "glucose-6 phosphate";
  substanceOnly species Afru6p in cyto = 0.05*cyto; Afru6p is "fructose-6 phosphate";
  substanceOnly species Afru16bp in cyto = 0.02*cyto; Afru16bp is "fructose-16 bisphosphate";
  substanceOnly species Afru26bp in cyto = 0.004*cyto; Afru26bp is "fructose-26 bisphosphate";
  substanceOnly species Agrap in cyto = 0.1*cyto; Agrap is "glyceraldehyde 3-phosphate";
  substanceOnly species Adhap in cyto = 0.03*cyto; Adhap is "dihydroxyacetone phosphate";
  substanceOnly species Abpg13 in cyto = 0.3*cyto; Abpg13 is "13-bisphospho-glycerate";
  substanceOnly species Apg3 in cyto = 0.27*cyto; Apg3 is "3-phosphoglycerate";
  substanceOnly species Apg2 in cyto = 0.03*cyto; Apg2 is "2-phosphoglycerate";
  substanceOnly species Apep in cyto = 0.15*cyto; Apep is "phosphoenolpyruvate";
  substanceOnly species Apyr in cyto = 0.1*cyto; Apyr is "pyruvate";
  substanceOnly species Aoaa in cyto = 0.01*cyto; Aoaa is "oxaloacetate";
  substanceOnly species Alac in cyto = 0.5*cyto; Alac is "lactate";
  substanceOnly species $Aglc_ext in ext = 3*ext; Aglc_ext is "glucose";
  substanceOnly species $Alac_ext in ext = 1.2*ext; Alac_ext is "lactate";
  substanceOnly species $Aco2_mito in mito = 5*mito; Aco2_mito is "CO2";
  substanceOnly species $Aphos_mito in mito = 5*mito; Aphos_mito is "phosphate";
  substanceOnly species Aoaa_mito in mito = 0.01*mito; Aoaa_mito is "oxaloacetate";
  substanceOnly species Apep_mito in mito = 0.15*mito; Apep_mito is "phosphoenolpyruvate";
  substanceOnly species $Aacoa_mito in mito = 0.04*mito; Aacoa_mito is "acetyl-coenzyme A";
  substanceOnly species Apyr_mito in mito = 0.1*mito; Apyr_mito is "pyruvate";
  substanceOnly species $Acit_mito in mito = 0.32*mito; Acit_mito is "citrate";
  substanceOnly species $Aatp_mito in mito = 2.8*mito; Aatp_mito is "ATP";
  substanceOnly species $Aadp_mito in mito = 0.8*mito; Aadp_mito is "ADP";
  substanceOnly species Agtp_mito in mito = 0.29*mito; Agtp_mito is "GTP";
  substanceOnly species Agdp_mito in mito = 0.1*mito; Agdp_mito is "GDP";
  substanceOnly species $Acoa_mito in mito = 0.055*mito; Acoa_mito is "coenzyme A";
  substanceOnly species $Anadh_mito in mito = 0.24*mito; Anadh_mito is "NADH";
  substanceOnly species $Anad_mito in mito = 0.98*mito; Anad_mito is "NAD+";
  substanceOnly species $Ah2o_mito in mito = 0; Ah2o_mito is "H20";
  substanceOnly species $Ah_mito in mito = 0; Ah_mito is "H+";

  // Parameters:
  scale = 1 dimensionless; scale is "scaling factor for rates";
  V_cyto = 1 litre; V_cyto is "cytosolic volume";
  f_mito = 0.2 dimensionless; f_mito is "mitochondrial volume factor";
  Vliver = 1.5 litre; Vliver is "liver volume";
  fliver = 0.5833333 dimensionless; fliver is "parenchymal fraction liver";
  bodyweight = 70 kg;
  sec_per_min = 60 s_per_min; sec_per_min is "time conversion";
  mumole_per_mmole = 1000 mumole_per_mmole; mumole_per_mmole is "amount conversion";
  x_ins1 = 818.9 pM;
  x_ins2 = 0 pM;
  x_ins3 = 8.6 mM;
  x_ins4 = 4.2 dimensionless;
  x_glu1 = 190 pM;
  x_glu2 = 37.9 pM;
  x_glu3 = 3.01 mM;
  x_glu4 = 6.4 dimensionless;
  x_epi1 = 6090 pM;
  x_epi2 = 100 pM;
  x_epi3 = 3.1 mM;
  x_epi4 = 8.4 dimensionless;
  K_val = 0.1 dimensionless;
  epi_f = 0.8 dimensionless;
  atp has mM; atp is "ATP concentration";
  adp has mM; adp is "ADP concentration";
  amp has mM; amp is "AMP concentration";
  utp has mM; utp is "UTP concentration";
  udp has mM; udp is "UDP concentration";
  gtp has mM; gtp is "GTP concentration";
  gdp has mM; gdp is "GDP concentration";
  nad has mM; nad is "NAD+ concentration";
  nadh has mM; nadh is "NADH concentration";
  phos has mM; phos is "phosphate concentration";
  pp has mM; pp is "pyrophosphate concentration";
  co2 has mM; co2 is "CO2 concentration";
  h2o has mM; h2o is "H2O concentration";
  h has mM; h is "H+ concentration";
  glc1p has mM; glc1p is "glucose-1 phosphate concentration";
  udpglc has mM; udpglc is "UDP-glucose concentration";
  glyglc has mM; glyglc is "glycogen concentration";
  glc has mM; glc is "glucose concentration";
  glc6p has mM; glc6p is "glucose-6 phosphate concentration";
  fru6p has mM; fru6p is "fructose-6 phosphate concentration";
  fru16bp has mM; fru16bp is "fructose-16 bisphosphate concentration";
  fru26bp has mM; fru26bp is "fructose-26 bisphosphate concentration";
  grap has mM; grap is "glyceraldehyde 3-phosphate concentration";
  dhap has mM; dhap is "dihydroxyacetone phosphate concentration";
  bpg13 has mM; bpg13 is "13-bisphospho-glycerate concentration";
  pg3 has mM; pg3 is "3-phosphoglycerate concentration";
  pg2 has mM; pg2 is "2-phosphoglycerate concentration";
  pep has mM; pep is "phosphoenolpyruvate concentration";
  pyr has mM; pyr is "pyruvate concentration";
  oaa has mM; oaa is "oxaloacetate concentration";
  lac has mM; lac is "lactate concentration";
  glc_ext has mM; glc_ext is "glucose concentration";
  lac_ext has mM; lac_ext is "lactate concentration";
  co2_mito has mM; co2_mito is "CO2 concentration";
  phos_mito has mM; phos_mito is "phosphate concentration";
  oaa_mito has mM; oaa_mito is "oxaloacetate concentration";
  pep_mito has mM; pep_mito is "phosphoenolpyruvate concentration";
  acoa_mito has mM; acoa_mito is "acetyl-coenzyme A concentration";
  pyr_mito has mM; pyr_mito is "pyruvate concentration";
  cit_mito has mM; cit_mito is "citrate concentration";
  atp_mito has mM; atp_mito is "ATP concentration";
  adp_mito has mM; adp_mito is "ADP concentration";
  gtp_mito has mM; gtp_mito is "GTP concentration";
  gdp_mito has mM; gdp_mito is "GDP concentration";
  coa_mito has mM; coa_mito is "coenzyme A concentration";
  nadh_mito has mM; nadh_mito is "NADH concentration";
  nad_mito has mM; nad_mito is "NAD+ concentration";
  h2o_mito has mM; h2o_mito is "H20 concentration";
  h_mito has mM; h_mito is "H+ concentration";
  V_mito has m3; V_mito is "mitochondrial volume";
  flux_conversion has mumole_per_mmole_kg;
  f_gly has dimensionless; f_gly is "scaling factor glycolysis";
  f_glyglc has dimensionless; f_glyglc is "scaling factor glycogen metabolism";
  ins has pM; ins is "insulin";
  ins_norm has pM; ins_norm is "insulin normalized";
  glu has pM; glu is "glucagon";
  glu_norm has pM; glu_norm is "glucagon normalized";
  epi has pM; epi is "epinephrine";
  epi_norm has pM; epi_norm is "epinephrine normalized";
  K_ins has pM;
  K_glu has pM;
  K_epi has pM;
  gamma has dimensionless; gamma is "phosphorylation state";
  nadh_tot has mM; nadh_tot is "NADH balance";
  atp_tot has mM; atp_tot is "ATP balance";
  utp_tot has mM; utp_tot is "UTP balance";
  gtp_tot has mM; gtp_tot is "GTP balance";
  nadh_mito_tot has mM; nadh_mito_tot is "NADH mito balance";
  atp_mito_tot has mM; atp_mito_tot is "ATP mito balance";
  gtp_mito_tot has mM; gtp_mito_tot is "GTP mito balance";
  HGP has mumol_per_min_kg; HGP is "hepatic glucose production/utilization";
  GNG has mumol_per_min_kg; GNG is "gluconeogenesis/glycolysis";
  GLY has mumol_per_min_kg; GLY is "glycogenolysis/glycogen synthesis";
  GLUT2_keq = 1 dimensionless;
  GLUT2_k_glc = 42 mM;
  GLUT2_Vmax = 420 mmole_per_min;
  GK_n_gkrp = 2 dimensionless;
  GK_k_glc1 = 15 mM;
  GK_k_fru6p = 0.01 mM;
  GK_b = 0.7 dimensionless;
  GK_n = 1.6 dimensionless;
  GK_k_glc = 7.5 mM;
  GK_k_atp = 0.26 mM;
  GK_Vmax = 25.2 mmole_per_min;
  GK_gc_free has dimensionless;
  G6PASE_k_glc6p = 2 mM;
  G6PASE_Vmax = 18.9 mmole_per_min;
  GPI_keq = 0.5170608 dimensionless;
  GPI_k_glc6p = 0.182 mM;
  GPI_k_fru6p = 0.071 mM;
  GPI_Vmax = 420 mmole_per_min;
  G16PI_keq = 15.71755 dimensionless;
  G16PI_k_glc6p = 0.67 mM;
  G16PI_k_glc1p = 0.045 mM;
  G16PI_Vmax = 100 mmole_per_min;
  UPGASE_keq = 0.3122376 dimensionless;
  UPGASE_k_utp = 0.563 mM;
  UPGASE_k_glc1p = 0.172 mM;
  UPGASE_k_udpglc = 0.049 mM;
  UPGASE_k_pp = 0.166 mM;
  UPGASE_Vmax = 80 mmole_per_min;
  PPASE_k_pp = 0.005 mM;
  PPASE_Vmax = 2.4 mmole_per_min;
  GS_C = 500 mM;
  GS_k1_max = 0.2 dimensionless;
  GSn_k1 = 0.224 mM2;
  GSp_k1 = 3.003 mM2;
  GSn_k2 = 0.1504 mM;
  GSp_k2 = 0.09029 mM;
  GS_Vmax = 13.2 mmole_per_min;
  GS_fs has dimensionless;
  GSn_k_udpglc has mM;
  GSp_k_udpglc has mM;
  GSn has mmole_per_min;
  GSp has mmole_per_min;
  GP_keq = 0.2118265 per_mM;
  GPn_k_glyglc = 4.8 mM;
  GPp_k_glyglc = 2.7 mM;
  GPn_k_glc1p = 120 mM;
  GPp_k_glc1p = 2 mM;
  GPn_k_phos = 300 mM;
  GPp_k_phos = 5 mM;
  GPp_ki_glc = 5 mM;
  GPn_ka_amp = 1 mM;
  GPn_base_amp = 0.03 dimensionless;
  GPn_max_amp = 0.3 dimensionless;
  GP_Vmax = 6.8 mmole_per_min;
  GP_fmax has dimensionless;
  GPn_Vmax has mmole_per_min;
  GPn has mmole_per_min;
  GPp_Vmax has mmole_per_min;
  GPp has mmole_per_min;
  NDKGTP_keq = 1 dimensionless;
  NDKGTP_k_atp = 1.33 mM;
  NDKGTP_k_adp = 0.042 mM;
  NDKGTP_k_gtp = 0.15 mM;
  NDKGTP_k_gdp = 0.031 mM;
  NDKGTP_Vmax = 0 mmole_per_min;
  NDKUTP_keq = 1 dimensionless;
  NDKUTP_k_atp = 1.33 mM;
  NDKUTP_k_adp = 0.042 mM;
  NDKUTP_k_utp = 16 mM;
  NDKUTP_k_udp = 0.19 mM;
  NDKUTP_Vmax = 2940 mmole_per_min;
  AK_keq = 0.2473901 dimensionless;
  AK_k_atp = 0.09 mM;
  AK_k_amp = 0.08 mM;
  AK_k_adp = 0.11 mM;
  AK_Vmax = 0 mmole_per_min;
  PFK2n_n = 1.3 dimensionless;
  PFK2p_n = 2.1 dimensionless;
  PFK2n_k_fru6p = 0.016 mM;
  PFK2p_k_fru6p = 0.05 mM;
  PFK2n_k_atp = 0.28 mM;
  PFK2p_k_atp = 0.65 mM;
  PFK2_Vmax = 0.0042 mmole_per_min;
  PFK2n has mmole_per_min;
  PFK2p has mmole_per_min;
  FBP2n_k_fru26bp = 0.01 mM;
  FBP2p_k_fru26bp = 0.0005 mM;
  FBP2n_ki_fru6p = 0.0035 mM;
  FBP2p_ki_fru6p = 0.01 mM;
  FBP2_Vmax = 0.126 mmole_per_min;
  FBP2n has mmole_per_min;
  FBP2p has mmole_per_min;
  PFK1_k_atp = 0.111 mM;
  PFK1_k_fru6p = 0.077 mM;
  PFK1_ki_fru6p = 0.012 mM;
  PFK1_ka_fru26bp = 0.001 mM;
  PFK1_Vmax = 7.182 mmole_per_min;
  FBP1_ki_fru26bp = 0.001 mM;
  FBP1_k_fru16bp = 0.0013 mM;
  FBP1_Vmax = 4.326 mmole_per_min;
  ALD_keq = 9.762989e-5 mM;
  ALD_k_fru16bp = 0.0071 mM;
  ALD_k_dhap = 0.0364 mM;
  ALD_k_grap = 0.0071 mM;
  ALD_ki1_grap = 0.0572 mM;
  ALD_ki2_grap = 0.176 mM;
  ALD_Vmax = 420 mmole_per_min;
  TPI_keq = 0.05447699 dimensionless;
  TPI_k_dhap = 0.59 mM;
  TPI_k_grap = 0.42 mM;
  TPI_Vmax = 420 mmole_per_min;
  GAPDH_keq = 0.08677987 per_mM;
  GAPDH_k_nad = 0.05 mM;
  GAPDH_k_grap = 0.005 mM;
  GAPDH_k_phos = 3.9 mM;
  GAPDH_k_nadh = 0.0083 mM;
  GAPDH_k_bpg13 = 0.0035 mM;
  GAPDH_Vmax = 420 mmole_per_min;
  PGK_keq = 6.958644 dimensionless;
  PGK_k_adp = 0.35 mM;
  PGK_k_atp = 0.48 mM;
  PGK_k_bpg13 = 0.002 mM;
  PGK_k_pg3 = 1.2 mM;
  PGK_Vmax = 420 mmole_per_min;
  PGM_keq = 0.1813754 dimensionless;
  PGM_k_pg3 = 5 mM;
  PGM_k_pg2 = 1 mM;
  PGM_Vmax = 420 mmole_per_min;
  EN_keq = 0.05447699 dimensionless;
  EN_k_pep = 1 mM;
  EN_k_pg2 = 1 mM;
  EN_Vmax = 35.994 mmole_per_min;
  PKn_n = 3.5 dimensionless;
  PKp_n = 3.5 dimensionless;
  PKn_n_fbp = 1.8 dimensionless;
  PKp_n_fbp = 1.8 dimensionless;
  PKn_alpha = 1 dimensionless;
  PKp_alpha = 1.1 dimensionless;
  PKn_k_fbp = 0.00016 mM;
  PKp_k_fbp = 0.00035 mM;
  PKn_k_pep = 0.58 mM;
  PKp_k_pep = 1.1 mM;
  PKn_ba = 0.08 dimensionless;
  PKp_ba = 0.04 dimensionless;
  PK_ae = 1 dimensionless;
  PKn_k_pep_end = 0.08 mM;
  PK_k_adp = 2.3 mM;
  PK_Vmax = 46.2 mmole_per_min;
  PKn_f has dimensionless;
  PKp_f has dimensionless;
  PKn_alpha_inp has dimensionless;
  PKp_alpha_inp has dimensionless;
  PKn_pep_inp has mM;
  PKp_pep_inp has mM;
  PKn has mmole_per_min;
  PKp has mmole_per_min;
  PEPCK_keq = 336.9565 mM;
  PEPCK_k_pep = 0.237 mM;
  PEPCK_k_gdp = 0.0921 mM;
  PEPCK_k_co2 = 25.5 mM;
  PEPCK_k_oaa = 0.0055 mM;
  PEPCK_k_gtp = 0.0222 mM;
  PEPCK_Vmax = 0 mmole_per_min;
  PEPCKM_Vmax = 546 mmole_per_min;
  PC_k_atp = 0.22 mM;
  PC_k_pyr = 0.22 mM;
  PC_k_co2 = 3.2 mM;
  PC_k_acoa = 0.015 mM;
  PC_n = 2.5 dimensionless;
  PC_Vmax = 168 mmole_per_min;
  LDH_keq = 0.0002783211 dimensionless;
  LDH_k_pyr = 0.495 mM;
  LDH_k_lac = 31.98 mM;
  LDH_k_nad = 0.984 mM;
  LDH_k_nadh = 0.027 mM;
  LDH_Vmax = 12.6 mmole_per_min;
  LACT_keq = 1 dimensionless;
  LACT_k_lac = 0.8 mM;
  LACT_Vmax = 5.418 mmole_per_min;
  PYRTM_keq = 1 dimensionless;
  PYRTM_k_pyr = 0.1 mM;
  PYRTM_Vmax = 42 mmole_per_min;
  PEPTM_keq = 1 dimensionless;
  PEPTM_k_pep = 0.1 mM;
  PEPTM_Vmax = 33.6 mmole_per_min;
  PDH_k_pyr = 0.025 mM;
  PDH_k_coa = 0.013 mM;
  PDH_k_nad = 0.05 mM;
  PDH_ki_acoa = 0.035 mM;
  PDH_ki_nadh = 0.036 mM;
  PDHn_alpha = 5 dimensionless;
  PDHp_alpha = 1 dimensionless;
  PDH_Vmax = 13.44 mmole_per_min;
  PDH_base has mmole_per_min;
  PDHn has mmole_per_min;
  PDHp has mmole_per_min;
  CS_keq = 266599 dimensionless;
  CS_k_oaa = 0.002 mM;
  CS_k_acoa = 0.016 mM;
  CS_k_cit = 0.42 mM;
  CS_k_coa = 0.07 mM;
  CS_Vmax = 4.2 mmole_per_min;
  NDKGTPM_keq = 1 dimensionless;
  NDKGTPM_k_atp = 1.33 mM;
  NDKGTPM_k_adp = 0.042 mM;
  NDKGTPM_k_gtp = 0.15 mM;
  NDKGTPM_k_gdp = 0.031 mM;
  NDKGTPM_Vmax = 420 mmole_per_min;
  OAAFLX_Vmax = 0 mmole_per_min;
  ACOAFLX_Vmax = 0 mmole_per_min;
  CITFLX_Vmax = 0 mmole_per_min;

  // Assignment rules:
  cyto := V_cyto;
  mito := V_mito;
  atp := Aatp/cyto;
  adp := Aadp/cyto;
  amp := Aamp/cyto;
  utp := Autp/cyto;
  udp := Audp/cyto;
  gtp := Agtp/cyto;
  gdp := Agdp/cyto;
  nad := Anad/cyto;
  nadh := Anadh/cyto;
  phos := Aphos/cyto;
  pp := App/cyto;
  co2 := Aco2/cyto;
  h2o := Ah2o/cyto;
  h := Ah/cyto;
  glc1p := Aglc1p/cyto;
  udpglc := Audpglc/cyto;
  glyglc := Aglyglc/cyto;
  glc := Aglc/cyto;
  glc6p := Aglc6p/cyto;
  fru6p := Afru6p/cyto;
  fru16bp := Afru16bp/cyto;
  fru26bp := Afru26bp/cyto;
  grap := Agrap/cyto;
  dhap := Adhap/cyto;
  bpg13 := Abpg13/cyto;
  pg3 := Apg3/cyto;
  pg2 := Apg2/cyto;
  pep := Apep/cyto;
  pyr := Apyr/cyto;
  oaa := Aoaa/cyto;
  lac := Alac/cyto;
  glc_ext := Aglc_ext/ext;
  lac_ext := Alac_ext/ext;
  co2_mito := Aco2_mito/mito;
  phos_mito := Aphos_mito/mito;
  oaa_mito := Aoaa_mito/mito;
  pep_mito := Apep_mito/mito;
  acoa_mito := Aacoa_mito/mito;
  pyr_mito := Apyr_mito/mito;
  cit_mito := Acit_mito/mito;
  atp_mito := Aatp_mito/mito;
  adp_mito := Aadp_mito/mito;
  gtp_mito := Agtp_mito/mito;
  gdp_mito := Agdp_mito/mito;
  coa_mito := Acoa_mito/mito;
  nadh_mito := Anadh_mito/mito;
  nad_mito := Anad_mito/mito;
  h2o_mito := Ah2o_mito/mito;
  h_mito := Ah_mito/mito;
  V_mito := f_mito*V_cyto;
  flux_conversion := mumole_per_mmole/bodyweight;
  f_gly := scale;
  f_glyglc := scale;
  ins := x_ins2 + (x_ins1 - x_ins2)*glc_ext^x_ins4/(glc_ext^x_ins4 + x_ins3^x_ins4);
  ins_norm := max(0 pM, ins - x_ins2);
  glu := x_glu2 + (x_glu1 - x_glu2)*(1 - glc_ext^x_glu4/(glc_ext^x_glu4 + x_glu3^x_glu4));
  glu_norm := max(0 pM, glu - x_glu2);
  epi := x_epi2 + (x_epi1 - x_epi2)*(1 - glc_ext^x_epi4/(glc_ext^x_epi4 + x_epi3^x_epi4));
  epi_norm := max(0 pM, epi - x_epi2);
  K_ins := (x_ins1 - x_ins2)*K_val;
  K_glu := (x_glu1 - x_glu2)*K_val;
  K_epi := (x_epi1 - x_epi2)*K_val;
  gamma := 0.5*(1 - ins_norm/(ins_norm + K_ins) + max(glu_norm/(glu_norm + K_glu), epi_f*epi_norm/(epi_norm + K_epi)));
  nadh_tot := nadh + nad;
  atp_tot := atp + adp + amp;
  utp_tot := utp + udp + udpglc;
  gtp_tot := gtp + gdp;
  nadh_mito_tot := nadh_mito + nad_mito;
  atp_mito_tot := atp_mito + adp_mito;
  gtp_mito_tot := gtp_mito + gdp_mito;
  HGP := GLUT2*flux_conversion;
  GNG := GPI*flux_conversion;
  GLY := -G16PI*flux_conversion;
  GK_gc_free := glc^GK_n_gkrp/(glc^GK_n_gkrp + GK_k_glc1^GK_n_gkrp)*(1 - GK_b*fru6p/(fru6p + GK_k_fru6p));
  GS_fs := (1 + GS_k1_max)*(GS_C - glyglc)/(GS_C - glyglc + GS_k1_max*GS_C);
  GSn_k_udpglc := GSn_k1/(glc6p + GSn_k2);
  GSp_k_udpglc := GSp_k1/(glc6p + GSp_k2);
  GSn := f_glyglc*GS_Vmax*GS_fs*udpglc/(GSn_k_udpglc + udpglc);
  GSp := f_glyglc*GS_Vmax*GS_fs*udpglc/(GSp_k_udpglc + udpglc);
  GP_fmax := (1 + GS_k1_max)*glyglc/(glyglc + GS_k1_max*GS_C);
  GPn_Vmax := f_glyglc*GP_Vmax*GP_fmax*(GPn_base_amp + (GPn_max_amp - GPn_base_amp)*amp/(amp + GPn_ka_amp));
  GPn := GPn_Vmax/(GPn_k_glyglc*GPn_k_phos)*(glyglc*phos - glc1p/GP_keq)/((1 + glyglc/GPn_k_glyglc)*(1 + phos/GPn_k_phos) + 1 + glc1p/GPn_k_glc1p - 1);
  GPp_Vmax := f_glyglc*GP_Vmax*GP_fmax*exp(-log10(2)/GPp_ki_glc*glc);
  GPp := GPp_Vmax/(GPp_k_glyglc*GPp_k_phos)*(glyglc*phos - glc1p/GP_keq)/((1 + glyglc/GPp_k_glyglc)*(1 + phos/GPp_k_phos) + 1 + glc1p/GPp_k_glc1p - 1);
  PFK2n := f_gly*PFK2_Vmax*fru6p^PFK2n_n/(fru6p^PFK2n_n + PFK2n_k_fru6p^PFK2n_n)*atp/(atp + PFK2n_k_atp);
  PFK2p := f_gly*PFK2_Vmax*fru6p^PFK2p_n/(fru6p^PFK2p_n + PFK2p_k_fru6p^PFK2p_n)*atp/(atp + PFK2p_k_atp);
  FBP2n := f_gly*FBP2_Vmax/(1 + fru6p/FBP2n_ki_fru6p)*fru26bp/(FBP2n_k_fru26bp + fru26bp);
  FBP2p := f_gly*FBP2_Vmax/(1 + fru6p/FBP2p_ki_fru6p)*fru26bp/(FBP2p_k_fru26bp + fru26bp);
  PKn_f := fru16bp^PKn_n_fbp/(PKn_k_fbp^PKn_n_fbp + fru16bp^PKn_n_fbp);
  PKp_f := fru16bp^PKp_n_fbp/(PKp_k_fbp^PKp_n_fbp + fru16bp^PKp_n_fbp);
  PKn_alpha_inp := (1 - PKn_f)*(PKn_alpha - PK_ae) + PK_ae;
  PKp_alpha_inp := (1 - PKp_f)*(PKp_alpha - PK_ae) + PK_ae;
  PKn_pep_inp := (1 - PKn_f)*(PKn_k_pep - PKn_k_pep_end) + PKn_k_pep_end;
  PKp_pep_inp := (1 - PKp_f)*(PKp_k_pep - PKn_k_pep_end) + PKn_k_pep_end;
  PKn := f_gly*PK_Vmax*PKn_alpha_inp*pep^PKn_n/(PKn_pep_inp^PKn_n + pep^PKn_n)*adp/(adp + PK_k_adp)*(PKn_ba + (1 - PKn_ba)*PKn_f);
  PKp := f_gly*PK_Vmax*PKp_alpha_inp*pep^PKp_n/(PKp_pep_inp^PKp_n + pep^PKp_n)*adp/(adp + PK_k_adp)*(PKp_ba + (1 - PKp_ba)*PKp_f);
  PDH_base := f_gly*PDH_Vmax*pyr_mito/(pyr_mito + PDH_k_pyr)*nad_mito/(nad_mito + PDH_k_nad*(1 + nadh_mito/PDH_ki_nadh))*coa_mito/(coa_mito + PDH_k_coa*(1 + acoa_mito/PDH_ki_acoa));
  PDHn := PDH_base*PDHn_alpha;
  PDHp := PDH_base*PDHp_alpha;

  // Reactions:
  GLUT2: $Aglc_ext -> Aglc; f_gly*(GLUT2_Vmax/GLUT2_k_glc)*(glc_ext - glc/GLUT2_keq)/(1 + glc_ext/GLUT2_k_glc + glc/GLUT2_k_glc); GLUT2 is "GLUT2 glucose transporter";
  GK: Aglc + $Aatp => Aglc6p + $Aadp + $Ah; f_gly*GK_Vmax*GK_gc_free*(atp/(GK_k_atp + atp))*(glc^GK_n/(glc^GK_n + GK_k_glc^GK_n)); GK is "Glucokinase";  // modifiers: Aglc1p, Afru6p
  G6PASE: Aglc6p + $Ah2o => Aglc + $Aphos; f_gly*G6PASE_Vmax*(glc6p/(G6PASE_k_glc6p + glc6p)); G6PASE is "D-Glucose-6-phosphate Phosphatase";
  GPI: Aglc6p -> Afru6p; f_gly*(GPI_Vmax/GPI_k_glc6p)*(glc6p - fru6p/GPI_keq)/(1 + glc6p/GPI_k_glc6p + fru6p/GPI_k_fru6p); GPI is "D-Glucose-6-phosphate Isomerase";
  G16PI: Aglc1p -> Aglc6p; f_glyglc*(G16PI_Vmax/G16PI_k_glc1p)*(glc1p - glc6p/G16PI_keq)/(1 + glc1p/G16PI_k_glc1p + glc6p/G16PI_k_glc6p); G16PI is "Glucose 1-phosphate 1,6-phosphomutase";
  UPGASE: Aglc1p + $Ah + Autp -> App + Audpglc; f_glyglc*UPGASE_Vmax/(UPGASE_k_utp*UPGASE_k_glc1p)*(utp*glc1p - udpglc*pp/UPGASE_keq)/((1 + utp/UPGASE_k_utp)*(1 + glc1p/UPGASE_k_glc1p) + (1 + udpglc/UPGASE_k_udpglc)*(1 + pp/UPGASE_k_pp) - 1); UPGASE is "UTP:Glucose-1-phosphate uridylyltransferase";
  PPASE: App + $Ah2o => $Ah + 2 $Aphos; f_glyglc*PPASE_Vmax*pp/(pp + PPASE_k_pp); PPASE is "Pyrophosphate phosphohydrolase";
  GS: Audpglc + $Ah2o => Audp + $Ah + Aglyglc; (1 - gamma)*GSn + gamma*GSp; GS is "Glycogen synthase";  // modifiers: Aglc6p
  GP: Aglyglc + $Aphos -> Aglc1p + $Ah2o; (1 - gamma)*GPn + gamma*GPp; GP is "Glycogen-Phosphorylase";  // modifiers: Aamp, Aglc
  NDKGTP: $Aatp + Agdp -> $Aadp + Agtp; f_gly*NDKGTP_Vmax/(NDKGTP_k_atp*NDKGTP_k_gdp)*(atp*gdp - adp*gtp/NDKGTP_keq)/((1 + atp/NDKGTP_k_atp)*(1 + gdp/NDKGTP_k_gdp) + (1 + adp/NDKGTP_k_adp)*(1 + gtp/NDKGTP_k_gtp) - 1); NDKGTP is "Nucleoside-diphosphate kinase (ATP, GTP)";
  NDKUTP: $Aatp + Audp -> $Aadp + Autp; f_glyglc*NDKUTP_Vmax/(NDKUTP_k_atp*NDKUTP_k_udp)*(atp*udp - adp*utp/NDKUTP_keq)/((1 + atp/NDKUTP_k_atp)*(1 + udp/NDKUTP_k_udp) + (1 + adp/NDKUTP_k_adp)*(1 + utp/NDKUTP_k_utp) - 1); NDKUTP is "Nucleoside-diphosphate kinase (ATP, UTP)";
  AK: $Aamp + $Aatp -> 2 $Aadp; f_gly*AK_Vmax/(AK_k_atp*AK_k_amp)*(atp*amp - adp*adp/AK_keq)/((1 + atp/AK_k_atp)*(1 + amp/AK_k_amp) + (1 + adp/AK_k_adp)*(1 + adp/AK_k_adp) - 1); AK is "ATP:AMP phosphotransferase (Adenylatkinase)";
  PFK2: Afru6p + $Aatp => Afru26bp + $Aadp + $Ah; (1 - gamma)*PFK2n + gamma*PFK2p; PFK2 is "ATP:D-fructose-6-phosphate 2-phosphotransferase";
  FBP2: Afru26bp + $Ah2o => Afru6p + $Aphos; (1 - gamma)*FBP2n + gamma*FBP2p; FBP2 is "D-Fructose-2,6-bisphosphate 2-phosphohydrolase";
  PFK1: Afru6p + $Aatp => Afru16bp + $Aadp + $Ah; f_gly*PFK1_Vmax*(1 - 1/(1 + fru26bp/PFK1_ka_fru26bp))*fru6p*atp/(PFK1_ki_fru6p*PFK1_k_atp + PFK1_k_fru6p*atp + PFK1_k_atp*fru6p + atp*fru6p); PFK1 is "ATP:D-fructose-6-phosphate 1-phosphotransferase";  // modifiers: Afru26bp
  FBP1: Afru16bp + $Ah2o => Afru6p + $Aphos; f_gly*FBP1_Vmax/(1 + fru26bp/FBP1_ki_fru26bp)*fru16bp/(fru16bp + FBP1_k_fru16bp); FBP1 is "D-Fructose-1,6-bisphosphate 1-phosphohydrolase";  // modifiers: Afru26bp
  ALD: Afru16bp -> Agrap + Adhap; f_gly*ALD_Vmax/ALD_k_fru16bp*(fru16bp - grap*dhap/ALD_keq)/(1 + fru16bp/ALD_k_fru16bp + grap/ALD_ki1_grap + dhap*(grap + ALD_k_grap)/(ALD_k_dhap*ALD_ki1_grap) + fru16bp*grap/(ALD_k_fru16bp*ALD_ki2_grap)); ALD is "Aldolase";
  TPI: Adhap -> Agrap; f_gly*TPI_Vmax/TPI_k_dhap*(dhap - grap/TPI_keq)/(1 + dhap/TPI_k_dhap + grap/TPI_k_grap); TPI is "Triosephosphate Isomerase";
  GAPDH: Agrap + $Anad + $Aphos -> Abpg13 + $Anadh + $Ah; f_gly*GAPDH_Vmax/(GAPDH_k_nad*GAPDH_k_grap*GAPDH_k_phos)*(nad*grap*phos - bpg13*nadh/GAPDH_keq)/((1 + nad/GAPDH_k_nad)*(1 + grap/GAPDH_k_grap)*(1 + phos/GAPDH_k_phos) + (1 + nadh/GAPDH_k_nadh)*(1 + bpg13/GAPDH_k_bpg13) - 1); GAPDH is "D-Glyceraldehyde-3-phosphate:NAD+ oxidoreductase";
  PGK: $Aadp + Abpg13 -> $Aatp + Apg3; f_gly*PGK_Vmax/(PGK_k_adp*PGK_k_bpg13)*(adp*bpg13 - atp*pg3/PGK_keq)/((1 + adp/PGK_k_adp)*(1 + bpg13/PGK_k_bpg13) + (1 + atp/PGK_k_atp)*(1 + pg3/PGK_k_pg3) - 1); PGK is "Phosphoglycerate Kinase";
  PGM: Apg3 -> Apg2; f_gly*PGM_Vmax*(pg3 - pg2/PGM_keq)/(pg3 + PGM_k_pg3*(1 + pg2/PGM_k_pg2)); PGM is "2-Phospho-D-glycerate 2,3-phosphomutase";
  EN: Apg2 -> $Ah2o + Apep; f_gly*EN_Vmax*(pg2 - pep/EN_keq)/(pg2 + EN_k_pg2*(1 + pep/EN_k_pep)); EN is "2-Phospho-D-glucerate hydro-lyase (enolase)";
  PK: Apep + $Aadp + $Ah => Apyr + $Aatp; (1 - gamma)*PKn + gamma*PKp; PK is "Pyruvatkinase";  // modifiers: Afru16bp
  PEPCK: Agtp + Aoaa -> $Aco2 + Agdp + Apep; f_gly*PEPCK_Vmax/(PEPCK_k_oaa*PEPCK_k_gtp)*(oaa*gtp - pep*gdp*co2/PEPCK_keq)/((1 + oaa/PEPCK_k_oaa)*(1 + gtp/PEPCK_k_gtp) + (1 + pep/PEPCK_k_pep)*(1 + gdp/PEPCK_k_gdp)*(1 + co2/PEPCK_k_co2) - 1); PEPCK is "PEPCK cyto";
  PEPCKM: Agtp_mito + Aoaa_mito -> $Aco2_mito + Agdp_mito + Apep_mito; f_gly*PEPCKM_Vmax/(PEPCK_k_oaa*PEPCK_k_gtp)*(oaa_mito*gtp_mito - pep_mito*gdp_mito*co2_mito/PEPCK_keq)/((1 + oaa_mito/PEPCK_k_oaa)*(1 + gtp_mito/PEPCK_k_gtp) + (1 + pep_mito/PEPCK_k_pep)*(1 + gdp_mito/PEPCK_k_gdp)*(1 + co2_mito/PEPCK_k_co2) - 1); PEPCKM is "PEPCK mito";
  PC: $Aatp_mito + Apyr_mito + $Aco2_mito + $Ah2o_mito => $Aadp_mito + Aoaa_mito + $Aphos_mito + 2 $Ah; f_gly*PC_Vmax*atp_mito/(PC_k_atp + atp_mito)*pyr_mito/(PC_k_pyr + pyr_mito)*co2_mito/(PC_k_co2 + co2_mito)*acoa_mito^PC_n/(acoa_mito^PC_n + PC_k_acoa^PC_n); PC is "Pyruvate Carboxylase";  // modifiers: Aacoa_mito
  LDH: Apyr + $Anadh + $Ah -> Alac + $Anad; f_gly*LDH_Vmax/(LDH_k_pyr*LDH_k_nadh)*(pyr*nadh - lac*nad/LDH_keq)/((1 + nadh/LDH_k_nadh)*(1 + pyr/LDH_k_pyr) + (1 + lac/LDH_k_lac)*(1 + nad/LDH_k_nad) - 1); LDH is "Lactate Dehydrogenase";
  LACT: $Alac_ext -> Alac; f_gly*LACT_Vmax/LACT_k_lac*(lac_ext - lac/LACT_keq)/(1 + lac_ext/LACT_k_lac + lac/LACT_k_lac); LACT is "Lactate transport (import)";
  PYRTM: Apyr -> Apyr_mito; f_gly*PYRTM_Vmax/PYRTM_k_pyr*(pyr - pyr_mito/PYRTM_keq)/(1 + pyr/PYRTM_k_pyr + pyr_mito/PYRTM_k_pyr); PYRTM is "Pyruvate transport (mito)";
  PEPTM: Apep_mito -> Apep; f_gly*PEPTM_Vmax/PEPTM_k_pep*(pep_mito - pep/PEPTM_keq)/(1 + pep/PEPTM_k_pep + pep_mito/PEPTM_k_pep); PEPTM is "PEP Transport (export mito)";
  PDH: Apyr_mito + $Acoa_mito + $Anad_mito => $Aacoa_mito + $Aco2_mito + $Anadh_mito; (1 - gamma)*PDHn + gamma*PDHp; PDH is "Pyruvate Dehydrogenase";
  CS: $Aacoa_mito + Aoaa_mito + $Ah2o_mito -> $Acit_mito + $Acoa_mito + $Ah_mito; f_gly*CS_Vmax/(CS_k_oaa*CS_k_acoa)*(acoa_mito*oaa_mito - cit_mito*coa_mito/CS_keq)/((1 + acoa_mito/CS_k_acoa)*(1 + oaa_mito/CS_k_oaa) + (1 + cit_mito/CS_k_cit)*(1 + coa_mito/CS_k_coa) - 1); CS is "Citrate Synthase";
  NDKGTPM: $Aatp_mito + Agdp_mito -> $Aadp_mito + Agtp_mito; f_gly*NDKGTPM_Vmax/(NDKGTPM_k_atp*NDKGTPM_k_gdp)*(atp_mito*gdp_mito - adp_mito*gtp_mito/NDKGTPM_keq)/((1 + atp_mito/NDKGTPM_k_atp)*(1 + gdp_mito/NDKGTPM_k_gdp) + (1 + adp_mito/NDKGTPM_k_adp)*(1 + gtp_mito/NDKGTPM_k_gtp) - 1); NDKGTPM is "Nucleoside-diphosphate kinase (ATP, GTP) mito";
  OAAFLX: => Aoaa_mito; f_gly*OAAFLX_Vmax; OAAFLX is "oxalacetate influx";
  ACOAFLX: $Aacoa_mito => ; f_gly*ACOAFLX_Vmax; ACOAFLX is "acetyl-coa efflux";
  CITFLX: $Acit_mito => ; f_gly*CITFLX_Vmax; CITFLX is "citrate efflux";

  // Unit definitions:
  unit l = litre;
  unit s = second;
  unit kg = kilogram;
  unit m = metre;
  unit m2 = metre^2;
  unit m3 = metre^3;
  unit per_s = 1 / second;
  unit min = 60 second;
  unit s_per_min = second / (60 second);
  unit mmole = 1e-3 mole;
  unit mM = mole / metre^3;
  unit per_mM = metre^3 / mole;
  unit mM2 = mole^2 / metre^6;
  unit pmol = 1e-12 mole;
  unit pM = 1e-12 mole / litre;
  unit mmole_per_min = 1e-3 mole / (60 second);
  unit mumole_per_mmole = 1e-6 mole / (1e-3 mole);
  unit mumole_per_mmole_kg = 1e-6 mole / (1e-3 mole * kilogram);
  unit mumol_per_min_kg = 1e-6 mole / (60 second * kilogram);
  unit mg = 1e-3 gram;
  unit ml = 1e-3 litre;
  unit per_min = 1 / (60 second);
  unit mmole_per_min_l = 1e-3 mole / (60 second * litre);
end
